folder simulations: version=37; creator=Apsim 7.10-r4207
  simulation WT
    metfile met: filename=z_12.met
    clock
      start_date = 01/01/2001  # Enter the start date of the simulation
      end_date = 30/06/2010  # Enter the end date of the simulation
    summaryfile
    area paddock
      surfaceom SurfaceOrganicMatter
        PoolName = soybean  # Organic Matter pool name
        type = soybean  # Organic Matter type
        mass = 2000  # Initial surface residue (kg/ha)
        cnr = 20  # C:N ratio of initial residue
        standing_fraction = 0.2  # Fraction of residue standing
      fertiliser
      maize
        ini: filename=modules_edited\Maize_aug2020.xml
      soybean
      folder Manager folder
        manager Rotations
          # Fallow options
          SummerFallowName = sf  # Enter summer fallow name
          SummerFallowEndDate = 15-mar  # Enter summer fallow END date (dd-mmm)
          WinterFallowName = wf  # Enter winter fallow name
          WinterFallowEndDate = 23-aug  # Enter winter fallow END date (dd-mmm)
          # Crop rotation sequence
          crop1 = soybean  # Enter 1st crop
          crop2 = maize  # Enter 2nd crop
          crop3 = soybean  # Enter 3rd crop
          crop4 = maize  # Enter 4th crop
          crop5 = soybean  # Enter 5th crop
          crop6 = maize  # Enter 6th crop
          crop7 = soybean  # Enter 7th crop
          crop8 = maize  # Enter 8th crop
          crop9 = soybean  # Enter 9th crop
          crop10 = maize  # Enter 10th crop
          crop11 = soybean  # Enter 11th crop
          crop12 = nil  # Enter 12th crop
          crop13 = nil  # Enter 13th crop
          crop14 = nil  # Enter 14th crop
          crop15 = nil  # Enter 15th crop
          crop16 = nil  # Enter 16th crop
          crop17 = nil  # Enter 17th crop
          crop18 = nil  # Enter 18th crop
          crop19 = nil  # Enter 19th crop
          crop20 = nil  # Enter 20th crop
          on init:
```
         NextCropIndex = 1
         NextCrop = ' '
         ChooseNextCrop = 'yes'
         SummerFallowIn = 'no'
         WinterFallowIn = 'no'
         FallowIn = 'no'
```
          on start_of_day:
```
      if (ChooseNextCrop = 'yes') then
         if (NextCropIndex = 1) then
            NextCrop = '[crop1]'
         elseif (NextCropIndex = 2) then
            NextCrop = '[crop2]'
         elseif (NextCropIndex = 3) then
            NextCrop = '[crop3]'
         elseif (NextCropIndex = 4) then
            NextCrop = '[crop4]'
         elseif (NextCropIndex = 5) then
            NextCrop = '[crop5]'
         elseif (NextCropIndex = 6) then
            NextCrop = '[crop6]'
         elseif (NextCropIndex = 7) then
            NextCrop = '[crop7]'
         elseif (NextCropIndex = 8) then
            NextCrop = '[crop8]'
         elseif (NextCropIndex = 9) then
            NextCrop = '[crop9]'
         elseif (NextCropIndex = 10) then
            NextCrop = '[crop10]'
         elseif (NextCropIndex = 11) then
            NextCrop = '[crop11]'
         elseif (NextCropIndex = 12) then
            NextCrop = '[crop12]'
         elseif (NextCropIndex = 13) then
            NextCrop = '[crop13]'
         elseif (NextCropIndex = 14) then
            NextCrop = '[crop14]'
         elseif (NextCropIndex = 15) then
            NextCrop = '[crop15]'
         elseif (NextCropIndex = 16) then
            NextCrop = '[crop16]'
         elseif (NextCropIndex = 17) then
            NextCrop = '[crop17]'
         elseif (NextCropIndex = 18) then
            NextCrop = '[crop18]'
         elseif (NextCropIndex = 19) then
            NextCrop = '[crop19]'
         elseif (NextCropIndex = 20) then
            NextCrop = '[crop20]'
         endif
         if (NextCrop = 'nil' or NextCrop = ' ') then
            NextCrop = '[crop1]'
            NextCropIndex = 1
         endif
         NextCropIndex = NextCropIndex + 1
         ChooseNextCrop = 'no'
      endif
      ! if the next crop is due to be a fallow and we're within the
      ! correct date range then put a fallow in.
      if (NextCrop = '[WinterFallowName]') then
         if (paddock_is_fallow() = 1 and FallowIn = 'no') then
            if (date_within('[SummerFallowEndDate], [WinterFallowEndDate]') then
               WinterFallowIn = 'yes'
               FallowIn = 'yes'
               ChooseNextCrop = 'yes'
            endif
         endif
      elseif (NextCrop = '[SummerFallowName]') then
         if (paddock_is_fallow() = 1 and FallowIn = 'no') then
            if (date_within('[WinterFallowEndDate], [SummerFallowEndDate]') then
               SummerFallowIn = 'yes'
               FallowIn = 'yes'
               ChooseNextCrop = 'yes'
            endif
         endif
      endif

      ! if we currently have a fallow in and we're at the end of the fallow window
      ! then remove the fallow.
      if (WinterFallowIn = 'yes' and today = date('[WinterFallowEndDate]')+1) then
         WinterFallowIn = 'no'
         FallowIn = 'no'
      endif
      if (SummerFallowIn = 'yes' and today = date('[SummerFallowEndDate]')+1) then
         SummerFallowIn = 'no'
         FallowIn = 'no'
      endif
```
        manager Tillage on fixed date
          # When should tillage be done
          tillage_date = 20-mar  # Enter tillage date (dd-mmm)
          # Tillage application details
          surfaceommodule = SurfaceOrganicMatter  # Module used to apply the tillage
          tillage_type = disc
          tillage_depth = 150  # User_defined depth of seedbed preparation (mm)
          tillage_f_incorp = 0.4  # User_defined fraction of surface residues to incorporate (0-1)
          on start_of_day:
```
         if (today = date('[tillage_date]') then
            if ('[tillage_type]' = 'user_defined') then
                '[surfaceommodule]' tillage type = [tillage_type], f_incorp = [tillage_f_incorp] (), tillage_depth = [tillage_depth]
            else
                '[surfaceommodule]' tillage type = [tillage_type]
            endif
            ready_to_till_pre_sow = 0
            till_day_pre_sow = 0
         endif
```
        manager Sow using a variable rule1
          # Sowing criteria
          date1_soy = 23-Apr  # Enter sowing window START date (dd-mmm)
          date2_soy = 06-May  # Enter sowing window END date (dd-mmm)
          must_sow = yes  # Must sow?
          raincrit = 5  # Amount of rainfall
          rainnumdays = 3  # Number of days of rainfall
          esw_amount = 200  # Enter minimum allowable available soil water (mm)
          # Sowing parameters
          crop = soybean  # Enter name of crop to sow
          density = 30  # Enter sowing density (plants/m2)
          depth = 50  # Enter sowing depth (mm)
          cultivar_soy = MG_3  # Enter cultivar
          class = plant  # Enter crop growth class
          row_spacing = 760  # Enter row spacing (mm)
          on start_of_day:
```
      if (paddock_is_fallow() = 1 and FallowIn <> 'yes' and (NextCrop = 0 or NextCrop = '[crop]')) then
         if (date_within('[date1_soy], [date2_soy]') = 1) then
            if (rain[[rainnumdays]] >= [raincrit] AND esw >= [esw_amount]) OR
                ('[must_sow]' = 'yes' AND today = date('[date2_soy]'))) THEN
               ChooseNextCrop = 'yes'   ! for rotations
               [crop] sow plants =[density], sowing_depth = [depth], cultivar = [cultivar_soy], row_spacing = [row_spacing], crop_class = [class]
            endif
            if today = date('[date2_soy]') then
               ChooseNextCrop = 'yes'
            endif
         endif
      endif
```
        manager Sow using a variable rule_fertv5
          # Sowing criteria
          date1_corn = 08-Apr  # Enter sowing window START date (dd-mmm)
          date2_corn = 08-Apr  # Enter sowing window END date (dd-mmm)
          must_sow = yes  # Must sow?
          raincrit = 0  # Amount of rainfall
          rainnumdays = 0  # Number of days of rainfall
          esw_amount = 20  # Enter minimum allowable available soil water (mm)
          # Sowing parameters
          crop = maize  # Enter name of crop to sow
          density_corn = 8  # Enter sowing density (plants/m2)
          depth = 50  # Enter sowing depth (mm)
          cultivar_corn = B_110_iowa  # Enter cultivar
          class = plant  # Enter crop growth class
          row_spacing = 760  # Enter row spacing (mm)
          on start_of_day:
```
      if (paddock_is_fallow() = 1 and FallowIn <> 'yes' and (NextCrop = 0 or NextCrop = '[crop]')) then
         if (date_within('[date1_corn], [date2_corn]') = 1) then
            if (rain[[rainnumdays]] >= [raincrit] AND esw >= [esw_amount]) OR
                ('[must_sow]' = 'yes' AND today = date('[date2_corn]'))) THEN
               ChooseNextCrop = 'yes'   ! for rotations
               [crop] sow plants =[density_corn], sowing_depth = [depth], cultivar = [cultivar_corn], row_spacing = [row_spacing], crop_class = [class]
		fert_applied = 0;
            endif
            if today = date('[date2_corn]') then
               ChooseNextCrop = 'yes'
            endif
         endif
      endif
```
        manager Fertilise at sowing
          # When should fertiliser be applied
          modulename = maize  # On which module should the event come from
          eventname = sowing  # On which event should fertiliser be applied
          # Fertiliser application details
          fertmodule = fertiliser  # Module used to apply the fertiliser
          fert_amount_sow = 10  # Amount of starter fertiliser at sowing (kg/ha)
          fert_type_sow = urea_N  # Sowing fertiliser type
          on [modulename].[eventname]:
```
        [fertmodule] apply amount = [fert_amount_sow] (kg/ha), depth = 50 (mm), type = [fert_type_sow]
```
        manager Harvesting rule
          # Harvesting criteria
          crop = maize  # Enter name of crop to harvest when ripe
          on end_of_day:
```
           if ([crop].StageName = 'harvest_ripe' or [crop].plant_status = 'dead') then
              [crop]  harvest
              [crop]  end_crop
           endif
```
        manager Harvesting rule1
          # Harvesting criteria
          crop = soybean  # Enter name of crop to harvest when ripe
          on end_of_day:
          script: same as in WT.paddock.Manager folder.Harvesting rule
        manager End crop on a fixed date1
          # Harvesting criteria
          crop = soybean  # Enter name of crop to harvest when ripe
          date = 29-nov  # Enter ending date (dd-mmm)
          on end_of_day:
```
        if (today = date('[date]') then
              [crop]  end_crop
        endif
```
        manager End crop on a fixed date2
          # Harvesting criteria
          crop = maize  # Enter name of crop to harvest when ripe
          date = 29-nov  # Enter ending date (dd-mmm)
          on end_of_day:
```
        if (today = date('[date]') then
              [crop]  end_crop
        endif
```
        manager Empty manager
          on start_of_day:
```
corn_buac   = maize.yield * 0.0159/0.85  ! corn yield in bushels/acre @15% moisture  
corn_kgha   = maize.yield / 0.85  ! corn yield @15% moisture 
 
soy_buac   = soybean.yield * 0.0149/0.87
soy_kgha   = soybean.yield / 0.87 ! soybeanyield @13% moisture  

oc_20cm = (oc(1) + oc(2))*0.5
oc_40cm = (oc_20cm + oc(3))*0.5
  
n_uptake_kgha = n_total_uptake * 10
bbc_gradient = 1
!water_table = 1000
```
          on end_of_day:
```
root_wt = fom_c() /0.4
root_cn = fom_c() /fom_n()

n_deep = no3() + nh4()

Y = paddock.soybean.yield +  paddock.maize.yield
```
        manager FertiliseV5
          # When should fertiliser be applied
          fert_date =  # Enter fertiliser date (dd-mmm)
          fert_criteria = 1000  # Don't add fertiliser if N in top 2 layers exceeds (kg/ha)
          # Fertiliser application details
          fertmodule = fertiliser  # Module used to apply the fertiliser
          fert_amount_stab = 150  # Amount of fertiliser to apply (kg/ha) stab
          fert_amount_yc = 150  # Amount of fertiliser to apply (kg/ha) yc
          fert_type = urea_N  # Fertiliser type
          on start_of_day:
```
        
	if (fert_applied = 0 AND LeafNo > 5) then
		if (year = 2010) then
               		[fertmodule] apply amount = [fert_amount_yc] (kg/ha), depth = 50 (mm), type = [fert_type] ()
		else 
			[fertmodule] apply amount = [fert_amount_stab] (kg/ha), depth = 50 (mm), type = [fert_type] ()
	        endif
		fert_applied = 1 
        endif
```
      outputfile: filename=WT.out; title=WT
        variables
          variables: dd/mm/yyyy as Date, year, month, day, Y, leach_no3, fertiliser, fert_applied, fom_c(), fom_n(), n_deep, surfaceom_c, surfaceom_n, surfaceom_wt, root_wt, root_cn, oc, biom_c, hum_c, inert_c, no3, nh4, sw, stage_name, Stage, LeafNo, ll15_dep(), dul_dep(), sw_dep(), sat_dep(), root_depth, swdef_expan, swdef_pheno, swdef_photo, LAI, st, Rain, Radn, MaxT, MinT, dnit, dlt_n_min(), n_total_uptake, surfaceom_cover, Biomass, water_table, subsurface_drain, subsurface_drain_no3, biom_c(), hum_c(), WeeklyAvgWT, dlayer, sat, dul, ll1, temp_stress, RUE, DeltaGreenWt, GrainGreenN
        events My Variables Events
          events: start_simulation, end_day, end_simulation
      Soil 242963: SoilType=242963; Region=Champaign; State=Illinois; Country=USA; ApsoilNumber=1; Latitude=40.12; Longitude=-88.19; YearOfSampling=2019; DataSource=ssurgo2apsim
        Comments=This soil was created with data from SSURGO Database, downloaded in R via the FedData package and parameters set using the approach described by Archontoulis et al. (2014, Agron. J. 106(3):1025-1040). This soil type represents
        Water
          Thickness  BD    AirDry  LL15  DUL   SAT   KS
          50         1.3   0.2     0.22  0.34  0.46  47.28
          50         1.3   0.2     0.22  0.34  0.46  47.28
          50         1.3   0.2     0.22  0.34  0.46  47.28
          50         1.3   0.21    0.22  0.34  0.46  47.28
          200        1.31  0.2     0.21  0.34  0.46  47.12
          200        1.32  0.2     0.2   0.33  0.45  45.45
          200        1.34  0.18    0.18  0.32  0.45  46.62
          200        1.38  0.16    0.16  0.3   0.42  67.41
          500        1.49  0.14    0.14  0.25  0.4   161.08
          500        1.55  0.13    0.13  0.22  0.39  219.03
          500        1.55  0.13    0.13  0.22  0.39  219.03
          SoilCrop maize
            LL=[0.22, 0.22, 0.22, 0.22, 0.21, 0.2, 0.18, 0.16, 0.14, 0.13, 0.13]
            KL=[0.08, 0.08, 0.08, 0.08, 0.073, 0.063, 0.055, 0.048, 0.038, 0.026, 0.019]
            XF=[1, 1, 1, 1, 1, 1, 1, 1, 1, 0.1, 0.1]
          SoilCrop soybean: same as WT.paddock.242963.Water.maize
        SoilWater: SummerCona=4; SummerU=9.05; SummerDate=1-jun; WinterCona=4; WinterU=9.05; WinterDate=1-nov; DiffusConst=40; DiffusSlope=16; Salb=0.15; CN2Bare=78; CNRed=20; CNCov=0.8; Thickness=[50, 50, 50, 50, 200, 200, 200, 200, 500, 500, 500]
          SWCON=[0.327, 0.327, 0.327, 0.327, 0.335, 0.35, 0.363, 0.373, 0.433, 0.48, 0.48]
        SoilOrganicMatter: RootCN=45; RootWt=1000; SoilCN=13; EnrACoeff=7.4; EnrBCoeff=0.2; OCUnits=Total
          Thickness  OC    FBiom   FInert
          50         3.2   0.04    0.4
          50         3.2   0.04    0.4
          50         3.2   0.0363  0.42
          50         3.2   0.0288  0.46
          200        3.17  0.015   0.56
          200        2.6   0.0116  0.72
          200        1.64  0.01    0.8
          200        0.77  0.01    0.8
          500        0.44  0.01    0.82
          500        0.12  0.01    0.98
          500        0     0.01    0.99
        Analysis: PHUnits=Water; BoronUnits=HotWater
          Thickness  PH    ParticleSizeSand  ParticleSizeSilt  ParticleSizeClay
          50         7.62  8                 61                31
          50         7.62  8                 61                31
          50         7.62  8                 61                31
          50         7.62  8                 61                31
          200        7.62  8                 61                31
          200        7.62  8                 61                31
          200        7.66  9.8               59.7              30.5
          200        7.89  21.5              51                27.5
          500        8.31  41.4              36                22.5
          500        8.47  48                31                21
          500        8.47  48                31                21
        Sample Intial conditions: NO3Units=kgha; NH4Units=kgha; SWUnits=Volumetric; OCUnits=Total; PHUnits=Water
          Thickness  NO3   NH4   SW
          50         3.2   1.6   0.34
          50         3.2   1.6   0.34
          50         3.2   1.6   0.34
          50         3.2   1.6   0.34
          200        3.17  1.58  0.34
          200        2.6   1.3   0.33
          200        1.64  0.82  0.32
          200        0.77  0.39  0.3
          500        0.44  0.22  0.25
          500        0.12  0.06  0.22
          500        0     0     0.22
      tracker
        variable=average of water_table on last 7 start_of_day as WeeklyAvgWT
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